*Heading
** Job name: Job-1 Model name: Model-1
** Generated by: Abaqus/CAE 2024
*Preprint, echo=NO, model=NO, history=NO, contact=NO
**
** PARTS
**
*Part, name=ConcretePath
*Node
      1, -0.949999988, 0.0500000007,           0.
      2, -0.949999988, -0.0420750007,           0.
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*Element, type=C3D8R
  1,   2,  19,   3,   1,  24,  41,  25,  23
  2,  19,   2,  14,  21,  41,  24,  36,  43
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*Nset, nset=Set-1, generate
   1,  968,    1
*Elset, elset=Set-1, generate
   1,  516,    1
** Section: Section-1
*Solid Section, elset=Set-1, material=Concrete
,
*End Part
**
*Part, name=SteelBeamSpan
*Node
      1, -0.115324996, 0.00146080845,           0.
      2, -0.115324996, 0.00781080825,           0.
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*Element, type=C3D8R
    1,     1,    27,    31,    13,    42,    68,    72,    54
    2,    32,    33,    28,    29,    73,    74,    69,    70
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*Nset, nset=Set-1, generate
     1,  17794,      1
*Elset, elset=Set-1, generate
     1,  10825,      1
** Section: Steel
*Solid Section, elset=Set-1, material=Steel
,
*End Part
**
**
** ASSEMBLY
**
*Assembly, name=Assembly
**
*Instance, name=ConcretePath-1, part=ConcretePath
*End Instance
**
*Instance, name=SteelBeamSpan-1, part=SteelBeamSpan
    0.721075,    -0.103861,           0.
*End Instance
**
*Instance, name=SteelBeamSpan-2, part=SteelBeamSpan
   -0.898175,    -0.103861,           0.
*End Instance
**
*Nset, nset=Set-1, instance=ConcretePath-1
   1,   2,   3,   4,   5,   6
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*Nset, nset=Set-1, instance=SteelBeamSpan-1
     1,     2,     3,     4,     5,     6
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*Nset, nset=Set-1, instance=SteelBeamSpan-2
     1,     2,     3,     4,     5,     6
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*Elset, elset=Set-1, instance=ConcretePath-1
   1,   2,   3,   4,   5,   6
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*Elset, elset=Set-1, instance=SteelBeamSpan-1
     1,     2,     3,     4,     5,     6
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*Elset, elset=Set-1, instance=SteelBeamSpan-2
     1,     2,     3,     4,     5,     6
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*Nset, nset=Set-2, instance=SteelBeamSpan-1
 8816, 8827, 8842, 8843, 8844, 8845
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*Nset, nset=Set-2, instance=SteelBeamSpan-2
 8816, 8827, 8842, 8843, 8844, 8845
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*Elset, elset=Set-2, instance=SteelBeamSpan-1
 5376, 5377, 5378, 5379, 5396, 5401, 5402, 5403, 5404, 5421, 5426, 5427, 5428, 5429, 5446
*Elset, elset=Set-2, instance=SteelBeamSpan-2
 5376, 5377, 5378, 5379, 5396, 5401, 5402, 5403, 5404, 5421, 5426, 5427, 5428, 5429, 5446
*Elset, elset=_m_Surf-3_S3, internal, instance=SteelBeamSpan-2
     6,    16,    31,    41,    56,    66
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*Elset, elset=_m_Surf-3_S5, internal, instance=SteelBeamSpan-2, generate
    13,  10813,     25
*Elset, elset=_m_Surf-3_S4, internal, instance=SteelBeamSpan-2
    17,    22,    42,    47,    67,    72
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*Elset, elset=_m_Surf-3_S6, internal, instance=SteelBeamSpan-2, generate
    23,  10823,     25
*Surface, type=ELEMENT, name=m_Surf-3
_m_Surf-3_S3, S3
_m_Surf-3_S5, S5
_m_Surf-3_S4, S4
_m_Surf-3_S6, S6
*Elset, elset=_m_Surf-4_S4, internal, instance=SteelBeamSpan-1
     5,    15,    24,    30,    40,    49
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*Elset, elset=_m_Surf-4_S5, internal, instance=SteelBeamSpan-1, generate
    12,  10812,     25
*Elset, elset=_m_Surf-4_S6, internal, instance=SteelBeamSpan-1
    14,    25,    39,    50,    64,    75
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*Surface, type=ELEMENT, name=m_Surf-4
_m_Surf-4_S4, S4
_m_Surf-4_S5, S5
_m_Surf-4_S6, S6
*Elset, elset=_s_Surf-3_S6, internal, instance=ConcretePath-1, generate
   1,  505,   12
*Surface, type=ELEMENT, name=s_Surf-3
_s_Surf-3_S6, S6
*Elset, elset=_s_Surf-4_S6, internal, instance=ConcretePath-1, generate
   3,  507,   12
*Surface, type=ELEMENT, name=s_Surf-4
_s_Surf-4_S6, S6
** Constraint: Constraint-2
*Tie, name=Constraint-2, adjust=yes
s_Surf-3, m_Surf-3
** Constraint: Constraint-3
*Tie, name=Constraint-3, adjust=yes
s_Surf-4, m_Surf-4
*End Assembly
**
** MATERIALS
**
*Material, name=Concrete
*Density
2500.,
*Elastic
 3.7e+10, 0.18
*Material, name=Steel
*Density
7870.,
*Elastic
 2.1e+11, 0.29
**
** BOUNDARY CONDITIONS
**
** Name: CrossBeam Type: Symmetry/Antisymmetry/Encastre
*Boundary
Set-2, YSYMM
** Name: Ends Type: Symmetry/Antisymmetry/Encastre
*Boundary
Set-1, ENCASTRE
** ----------------------------------------------------------------
**
** STEP: Freq
**
*Step, name=Freq, nlgeom=NO, perturbation
*Frequency, eigensolver=Lanczos, sim=NO, acoustic coupling=on, normalization=mass
10, , , , ,
**
** OUTPUT REQUESTS
**
*Restart, write, frequency=0
**
** FIELD OUTPUT: F-Output-1
**
*Output, field, variable=PRESELECT
**
** HISTORY OUTPUT: H-Output-1
**
*Output, history, variable=PRESELECT
*End Step
